*Heading
** Job name: UPXO-ABAQUS Model name: Model-1
** Generated by: Abaqus/CAE 6.14-1
**
** PARTS
**
*Part, name=Part-1
*Node
    1, -0.50000000, -0.50000000
    2, 0.50000000, -0.50000000
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*Element, type=CPS4
    1, 1, 2, 29, 28
    2, 28, 29, 56, 55
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*Elset, elset=Grain-0000
272, 273, 296, 297, 298, 299
*Elset, elset=Grain-0001
596, 597, 598, 622, 623, 624, 649, 650, 676
*Elset, elset=Grain-0002
625
*Elset, elset=Grain-0003
232, 257, 258, 259, 283, 284, 285, 286, 310,
311, 312, 337, 338, 363, 364, 390
*Elset, elset=Grain-0004
287, 288, 313, 314, 339, 340, 365, 366, 367,
391
*Elset, elset=Grain-0005
116, 142, 143, 169, 170
*Elset, elset=Grain-0006
392, 417, 418, 419, 443, 444
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*Elset, elset=Grain-0007
442, 468, 493, 494, 519, 520, 546
*Elset, elset=Grain-0008
177, 203, 229, 255, 256, 280, 281
*Elset, elset=Grain-0009
535, 536, 560, 561, 562, 563
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*Elset, elset=Grain-0010
56, 57, 58, 81, 82, 83
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*Elset, elset=Grain-0011
241, 265, 266, 267, 268, 290
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*Elset, elset=Grain-0012
141, 167, 168, 193, 194
*Elset, elset=Grain-0013
178, 179, 180, 204, 205, 206, 230, 231
*Elset, elset=Grain-0014
282, 307, 308, 309, 331, 332
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*Elset, elset=Grain-0015
60, 86, 87, 88, 111, 112
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*Elset, elset=Grain-0016
79, 105, 106, 131, 132, 157, 158, 183, 184,
185, 209
*Elset, elset=Grain-0017
103, 104, 129, 130, 154, 155, 156, 181, 182,
207, 208, 233, 234, 260
*Elset, elset=Grain-0018
5, 6, 7, 8, 9, 10
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*Elset, elset=Grain-0019
389, 415, 416
*Elset, elset=Grain-0020
521, 522, 523, 524, 525, 547
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*Elset, elset=Grain-0021
120, 121, 145, 146, 147, 148
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*Elset, elset=Grain-0022
186, 187, 212, 213, 214, 239, 240
*Elset, elset=Grain-0023
397, 422, 423
*Elset, elset=Grain-0024
593, 594, 595, 618, 619, 620, 621, 644, 645,
646
*Elset, elset=Grain-0025
18, 19, 20, 21, 22, 23
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*Elset, elset=Grain-0026
647, 648, 669, 670, 671, 672, 673, 674, 675
*Elset, elset=Grain-0027
1, 2, 3, 4, 27, 28, 29, 30, 53,
54, 55, 80
*Elset, elset=Grain-0028
52, 78
*Elset, elset=Grain-0029
300, 322, 323, 324, 325, 326
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*Elset, elset=Grain-0030
544, 545, 570, 571, 572
*Elset, elset=Grain-0031
651, 652, 653
*Elset, elset=Grain-0032
210, 211, 235, 236, 237, 238, 261, 262, 263,
264, 289
**Section: Sec-Grain-0000
*Solid Section, elset=Grain-0000, material=Mat-Grain-0000
,

**Section: Sec-Grain-0001
*Solid Section, elset=Grain-0001, material=Mat-Grain-0001
,

**Section: Sec-Grain-0002
*Solid Section, elset=Grain-0002, material=Mat-Grain-0002
,

**Section: Sec-Grain-0003
*Solid Section, elset=Grain-0003, material=Mat-Grain-0003
,

**Section: Sec-Grain-0004
*Solid Section, elset=Grain-0004, material=Mat-Grain-0004
,

**Section: Sec-Grain-0005
*Solid Section, elset=Grain-0005, material=Mat-Grain-0005
,

**Section: Sec-Grain-0006
*Solid Section, elset=Grain-0006, material=Mat-Grain-0006
,

**Section: Sec-Grain-0007
*Solid Section, elset=Grain-0007, material=Mat-Grain-0007
,

**Section: Sec-Grain-0008
*Solid Section, elset=Grain-0008, material=Mat-Grain-0008
,

**Section: Sec-Grain-0009
*Solid Section, elset=Grain-0009, material=Mat-Grain-0009
,

**Section: Sec-Grain-0010
*Solid Section, elset=Grain-0010, material=Mat-Grain-0010
,

**Section: Sec-Grain-0011
*Solid Section, elset=Grain-0011, material=Mat-Grain-0011
,

**Section: Sec-Grain-0012
*Solid Section, elset=Grain-0012, material=Mat-Grain-0012
,

**Section: Sec-Grain-0013
*Solid Section, elset=Grain-0013, material=Mat-Grain-0013
,

**Section: Sec-Grain-0014
*Solid Section, elset=Grain-0014, material=Mat-Grain-0014
,

**Section: Sec-Grain-0015
*Solid Section, elset=Grain-0015, material=Mat-Grain-0015
,

**Section: Sec-Grain-0016
*Solid Section, elset=Grain-0016, material=Mat-Grain-0016
,

**Section: Sec-Grain-0017
*Solid Section, elset=Grain-0017, material=Mat-Grain-0017
,

**Section: Sec-Grain-0018
*Solid Section, elset=Grain-0018, material=Mat-Grain-0018
,

**Section: Sec-Grain-0019
*Solid Section, elset=Grain-0019, material=Mat-Grain-0019
,

**Section: Sec-Grain-0020
*Solid Section, elset=Grain-0020, material=Mat-Grain-0020
,

**Section: Sec-Grain-0021
*Solid Section, elset=Grain-0021, material=Mat-Grain-0021
,

**Section: Sec-Grain-0022
*Solid Section, elset=Grain-0022, material=Mat-Grain-0022
,

**Section: Sec-Grain-0023
*Solid Section, elset=Grain-0023, material=Mat-Grain-0023
,

**Section: Sec-Grain-0024
*Solid Section, elset=Grain-0024, material=Mat-Grain-0024
,

**Section: Sec-Grain-0025
*Solid Section, elset=Grain-0025, material=Mat-Grain-0025
,

**Section: Sec-Grain-0026
*Solid Section, elset=Grain-0026, material=Mat-Grain-0026
,

**Section: Sec-Grain-0027
*Solid Section, elset=Grain-0027, material=Mat-Grain-0027
,

**Section: Sec-Grain-0028
*Solid Section, elset=Grain-0028, material=Mat-Grain-0028
,

**Section: Sec-Grain-0029
*Solid Section, elset=Grain-0029, material=Mat-Grain-0029
,

**Section: Sec-Grain-0030
*Solid Section, elset=Grain-0030, material=Mat-Grain-0030
,

**Section: Sec-Grain-0031
*Solid Section, elset=Grain-0031, material=Mat-Grain-0031
,

**Section: Sec-Grain-0032
*Solid Section, elset=Grain-0032, material=Mat-Grain-0032
,

*End Part
**
*Material, name=Mat-Grain-0000
*Depvar
12,
*User Material, constants=6
82,229,150,0,2,0
*Material, name=Mat-Grain-0001
*Depvar
12,
*User Material, constants=6
249,312,144,1,2,0
*Material, name=Mat-Grain-0002
*Depvar
12,
*User Material, constants=6
268,224,135,2,2,0
*Material, name=Mat-Grain-0003
*Depvar
12,
*User Material, constants=6
149,335,149,3,2,0
*Material, name=Mat-Grain-0004
*Depvar
12,
*User Material, constants=6
58,265,85,4,2,0
*Material, name=Mat-Grain-0005
*Depvar
12,
*User Material, constants=6
197,233,20,5,2,0
*Material, name=Mat-Grain-0006
*Depvar
12,
*User Material, constants=6
133,315,54,6,2,0
*Material, name=Mat-Grain-0007
*Depvar
12,
*User Material, constants=6
168,25,62,7,2,0
*Material, name=Mat-Grain-0008
*Depvar
12,
*User Material, constants=6
146,302,34,8,2,0
*Material, name=Mat-Grain-0009
*Depvar
12,
*User Material, constants=6
347,307,49,9,2,0
*Material, name=Mat-Grain-0010
*Depvar
12,
*User Material, constants=6
160,264,109,10,2,0
*Material, name=Mat-Grain-0011
*Depvar
12,
*User Material, constants=6
244,106,15,11,2,0
*Material, name=Mat-Grain-0012
*Depvar
12,
*User Material, constants=6
108,112,38,12,2,0
*Material, name=Mat-Grain-0013
*Depvar
12,
*User Material, constants=6
233,235,83,13,2,0
*Material, name=Mat-Grain-0014
*Depvar
12,
*User Material, constants=6
56,270,74,14,2,0
*Material, name=Mat-Grain-0015
*Depvar
12,
*User Material, constants=6
317,254,4,15,2,0
*Material, name=Mat-Grain-0016
*Depvar
12,
*User Material, constants=6
301,34,64,16,2,0
*Material, name=Mat-Grain-0017
*Depvar
12,
*User Material, constants=6
334,120,38,17,2,0
*Material, name=Mat-Grain-0018
*Depvar
12,
*User Material, constants=6
75,117,86,18,2,0
*Material, name=Mat-Grain-0019
*Depvar
12,
*User Material, constants=6
4,60,56,19,2,0
*Material, name=Mat-Grain-0020
*Depvar
12,
*User Material, constants=6
353,7,119,20,2,0
*Material, name=Mat-Grain-0021
*Depvar
12,
*User Material, constants=6
240,140,153,21,2,0
*Material, name=Mat-Grain-0022
*Depvar
12,
*User Material, constants=6
275,200,137,22,2,0
*Material, name=Mat-Grain-0023
*Depvar
12,
*User Material, constants=6
127,120,129,23,2,0
*Material, name=Mat-Grain-0024
*Depvar
12,
*User Material, constants=6
139,207,97,24,2,0
*Material, name=Mat-Grain-0025
*Depvar
12,
*User Material, constants=6
139,274,101,25,2,0
*Material, name=Mat-Grain-0026
*Depvar
12,
*User Material, constants=6
141,207,127,26,2,0
*Material, name=Mat-Grain-0027
*Depvar
12,
*User Material, constants=6
223,192,108,27,2,0
*Material, name=Mat-Grain-0028
*Depvar
12,
*User Material, constants=6
261,205,102,28,2,0
*Material, name=Mat-Grain-0029
*Depvar
12,
*User Material, constants=6
277,203,175,29,2,0
*Material, name=Mat-Grain-0030
*Depvar
12,
*User Material, constants=6
13,244,20,30,2,0
*Material, name=Mat-Grain-0031
*Depvar
12,
*User Material, constants=6
275,201,131,31,2,0
*Material, name=Mat-Grain-0032
*Depvar
12,
*User Material, constants=6
272,200,35,32,2,0

**
** STEP: Loading
**
*Step, name=Loading, nlgeom=YES, inc=10000
*Static
0.01, 10., 1e-05, 1.
**
** OUTPUT REQUESTS
**
*Restart, write, frequency=0
**
** FIELD OUTPUT: F-Output-1
**
*Output, field, variable=PRESELECT
**
** FIELD OUTPUT: F-Output-2
**
*Element Output, directions=YES
SDV,
**
** HISTORY OUTPUT: H-Output-1
**
*Output, history, variable=PRESELECT
**
*End Step
